** Copyright 2017 Confluent Medical Technologies
** Released as part of nitinol-design-concepts
** https://github.com/confluentmedical/nitinol-design-concepts
** under terms of Apache 2.0 license
** http://www.apache.org/licenses/LICENSE-2.0.txt
**
*Heading
** Job name: shape-set Model name: shape-set-AV-OSS-D101-01
** Generated by: Abaqus/CAE 2017
*Preprint, echo=NO, model=NO, history=NO, contact=NO
**
** PARTS
**
*Part, name=Concept-D101-as-cut
*Node
      1,   4.78270102,  0.496124983,   3.46970963
      2,   4.78270102,  0.513641536,   3.59221363
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*Element, type=C3D8R
  1,  473,  397,  691,  157,  569,  611,  586,  522
  2,  397,  398,  692,  691,  611,  612,  605,  586
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*Nset, nset=EALL, generate
     1,  15580,      1
*Elset, elset=EALL, generate
    1,  9928,     1
*Orientation, name=Ori-1, system=CYLINDRICAL
          0.,           0.,           0.,           1.,           0.,           0.
3, 0.
** Section: Section-1
*Solid Section, elset=EALL, orientation=Ori-1, controls=EC-1, material=ABQ_SUPER_ELASTIC_PLASTIC_Af19
,
*End Part
**
*Part, name=exp-cyl
*Node
      1,           0.,   -3.4000001,          65.
      2,           0.,   -3.4000001,           0.
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*Element, type=SFM3D4R
 1,  1,  2,  9, 60
 2, 60,  9, 10, 59
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*Nset, nset=EALL, generate
   1,  216,    1
*Elset, elset=EALL, generate
   1,  108,    1
*Elset, elset=_OD_SPOS, internal, generate
   1,  108,    1
*Surface, type=ELEMENT, name=OD
_OD_SPOS, SPOS
** Section: Section-2
*Surface Section, elset=EALL
*End Part
**
*Part, name=large-dia-sleeve
*Node
      1,           0.,         -21.,          15.
      2,           0.,         -21.,           0.
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*Element, type=SFM3D4R
 1,  1,  2,  7, 70
 2, 70,  7,  8, 69
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*Nset, nset=EALL, generate
   1,  134,    1
*Elset, elset=EALL, generate
  1,  66,   1
*Elset, elset=_ID_SNEG, internal, generate
  1,  66,   1
*Surface, type=ELEMENT, name=ID
_ID_SNEG, SNEG
** Section: Section-2
*Surface Section, elset=EALL
*End Part
**
*Part, name=mandrel-core
*End Part
**
*Part, name=mandrel-core-sleeve
*Node
      1,           0.,           0.,          15.
      2,           0.,           2.,          15.
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*Element, type=R3D4
 1,   1,  13, 252,  64
 2,  13,   2,  14, 252
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*Node
    902,           0.,           0.,           0.
*Nset, nset=mandrel-core-sleeve-RefPt_, internal
902,
*Nset, nset=Ref
 902,
*Nset, nset=EALL, generate
   1,  901,    1
*Elset, elset=EALL, generate
   1,  832,    1
*Elset, elset=_ID_SNEG, internal, generate
   1,  832,    1
*Surface, type=ELEMENT, name=ID
_ID_SNEG, SNEG
*End Part
**
**
** ASSEMBLY
**
*Assembly, name=Assembly
**
*Instance, name=Concept-D101-as-cut, part=Concept-D101-as-cut
          0.,           0.,         -1.2
          0.,           0.,         -1.2,           0.,           1.,         -1.2,          90.
*End Instance
**
*Instance, name=exp-cyl-1, part=exp-cyl
          0.,           0.,         -64.
*End Instance
**
*Instance, name=mandrel-core-1, part=mandrel-core
          0.,           0.,         -60.
          0.,           0.,         -60.,          -1.,           0.,         -60.,          90.
*Node
      1,           0.,           0.,           0.
*Nset, nset=mandrel-core-1-RefPt_, internal
1,
*Nset, nset=Ref
 1,
*Surface, type=REVOLUTION, name=OD
START,          20.,          29.
 LINE,          20.,          14.
 CIRCL, 16.0000006316032, 6.0000004737024,          10.,          14.
 CIRCL,          14.,           2.,          19.,           2.
 LINE,          14.,           0.
 LINE,          11.,          -4.
*Rigid Body, ref node=mandrel-core-1-RefPt_, analytical surface=OD
*End Instance
**
*Instance, name=mandrel-core-sleeve-1, part=mandrel-core-sleeve
          5.,           0.,         -60.
          5.,           0.,         -60., 4.42264972044796, 0.577350279552042, -60.577350279552, 119.999999109416
*End Instance
**
*Instance, name=large-dia-sleeve-1, part=large-dia-sleeve
          5.,           0.,         -95.
*End Instance
**
*Nset, nset=fix-r, instance=Concept-D101-as-cut
 14991,
*Nset, nset=fix-theta, instance=Concept-D101-as-cut
  1057,  1058,  1061,  1067,  1068,  1072
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*Elset, elset=fix-theta, instance=Concept-D101-as-cut
  657,  658,  659,  681,  682,  683
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*Nset, nset=fix-z, instance=Concept-D101-as-cut
 14991,
*Elset, elset=_ID_S2, internal, instance=Concept-D101-as-cut
 3756, 3757, 3758, 3759, 3760, 3761
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*Elset, elset=_ID_S4, internal, instance=Concept-D101-as-cut
  760,  764,  768,  772,  776,  780
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*Elset, elset=_ID_S6, internal, instance=Concept-D101-as-cut
    1,    5,    9,   13,   17,   21
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*Elset, elset=_ID_S1, internal, instance=Concept-D101-as-cut
  657,  658,  659,  660,  661,  662
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*Surface, type=ELEMENT, name=ID
_ID_S2, S2
_ID_S4, S4
_ID_S6, S6
_ID_S1, S1
*Elset, elset=_OD_S6, internal, instance=Concept-D101-as-cut
  757,  761,  765,  769,  773,  777
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*Elset, elset=_OD_S1, internal, instance=Concept-D101-as-cut
 3681, 3682, 3683, 3684, 3685, 3686
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*Elset, elset=_OD_S4, internal, instance=Concept-D101-as-cut
    4,    8,   12,   16,   20,   24
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*Elset, elset=_OD_S2, internal, instance=Concept-D101-as-cut
  732,  733,  734,  735,  736,  737
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*Surface, type=ELEMENT, name=OD
_OD_S6, S6
_OD_S1, S1
_OD_S4, S4
_OD_S2, S2
*Nset, nset=_T-cyl, internal
exp-cyl-1.EALL,
fix-r,
fix-theta,
fix-z,
*Transform, nset=_T-cyl, type=C
          0.,           0.,           0.,           0.,           0.,           1.
** Constraint: Constraint-1
*Rigid Body, ref node=mandrel-core-sleeve-1.Ref, elset=mandrel-core-sleeve-1.EALL
*Elset, elset=__core-sleeve_msm_1_SNEG, internal, instance=mandrel-core-sleeve-1, generate
  1,  52,   1
*Surface, type=ELEMENT, name=_core-sleeve_msm_1, internal
__core-sleeve_msm_1_SNEG, SNEG
*Elset, elset=__core-sleeve_msm_2_SNEG, internal, instance=mandrel-core-sleeve-1, generate
  53,  156,    1
*Surface, type=ELEMENT, name=_core-sleeve_msm_2, internal
__core-sleeve_msm_2_SNEG, SNEG
*Elset, elset=__core-sleeve_msm_3_SNEG, internal, instance=mandrel-core-sleeve-1, generate
 157,  416,    1
*Surface, type=ELEMENT, name=_core-sleeve_msm_3, internal
__core-sleeve_msm_3_SNEG, SNEG
*Elset, elset=__core-sleeve_msm_4_SNEG, internal, instance=mandrel-core-sleeve-1, generate
 417,  676,    1
*Surface, type=ELEMENT, name=_core-sleeve_msm_4, internal
__core-sleeve_msm_4_SNEG, SNEG
*Elset, elset=__core-sleeve_msm_5_SNEG, internal, instance=mandrel-core-sleeve-1, generate
 677,  780,    1
*Surface, type=ELEMENT, name=_core-sleeve_msm_5, internal
__core-sleeve_msm_5_SNEG, SNEG
*Elset, elset=__core-sleeve_msm_6_SNEG, internal, instance=mandrel-core-sleeve-1, generate
 781,  832,    1
*Surface, type=ELEMENT, name=_core-sleeve_msm_6, internal
__core-sleeve_msm_6_SNEG, SNEG
*Elset, elset=__core-sleeve_ssm_1_S6, internal, instance=Concept-D101-as-cut, generate
 9913,  9925,     4
*Surface, type=ELEMENT, name=_core-sleeve_ssm_1, internal
__core-sleeve_ssm_1_S6, S6
*Elset, elset=__core-sleeve_ssm_2_S1, internal, instance=Concept-D101-as-cut, generate
 9321,  9350,     1
*Surface, type=ELEMENT, name=_core-sleeve_ssm_2, internal
__core-sleeve_ssm_2_S1, S1
*Elset, elset=__core-sleeve_ssm_3_S1, internal, instance=Concept-D101-as-cut, generate
 9601,  9630,     1
*Surface, type=ELEMENT, name=_core-sleeve_ssm_3, internal
__core-sleeve_ssm_3_S1, S1
*Elset, elset=__core-sleeve_ssm_4_S1, internal, instance=Concept-D101-as-cut, generate
 9801,  9828,     1
*Surface, type=ELEMENT, name=_core-sleeve_ssm_4, internal
__core-sleeve_ssm_4_S1, S1
*Elset, elset=__core-sleeve_ssm_5_S6, internal, instance=Concept-D101-as-cut, generate
 8185,  9317,     4
*Surface, type=ELEMENT, name=_core-sleeve_ssm_5, internal
__core-sleeve_ssm_5_S6, S6
*Elset, elset=__core-sleeve_ssm_6_S1, internal, instance=Concept-D101-as-cut, generate
 8085,  8109,     1
*Surface, type=ELEMENT, name=_core-sleeve_ssm_6, internal
__core-sleeve_ssm_6_S1, S1
*Elset, elset=__core-sleeve_ssm_7_S1, internal, instance=Concept-D101-as-cut, generate
 9351,  9360,     1
*Surface, type=ELEMENT, name=_core-sleeve_ssm_7, internal
__core-sleeve_ssm_7_S1, S1
*Elset, elset=__core-sleeve_ssm_8_S4, internal, instance=Concept-D101-as-cut, generate
 6652,  7784,     4
*Surface, type=ELEMENT, name=_core-sleeve_ssm_8, internal
__core-sleeve_ssm_8_S4, S4
*Elset, elset=__core-sleeve_ssm_9_S1, internal, instance=Concept-D101-as-cut, generate
 7785,  7809,     1
*Surface, type=ELEMENT, name=_core-sleeve_ssm_9, internal
__core-sleeve_ssm_9_S1, S1
*Elset, elset=__core-sleeve_ssm_10_S1, internal, instance=Concept-D101-as-cut, generate
 7985,  8009,     1
*Surface, type=ELEMENT, name=_core-sleeve_ssm_10, internal
__core-sleeve_ssm_10_S1, S1
*Elset, elset=__core-sleeve_ssm_11_S6, internal, instance=Concept-D101-as-cut, generate
 4481,  5133,     4
*Surface, type=ELEMENT, name=_core-sleeve_ssm_11, internal
__core-sleeve_ssm_11_S6, S6
*Elset, elset=__core-sleeve_ssm_12_S1, internal, instance=Concept-D101-as-cut, generate
 6549,  6573,     1
*Surface, type=ELEMENT, name=_core-sleeve_ssm_12, internal
__core-sleeve_ssm_12_S1, S1
*Elset, elset=__core-sleeve_ssm_13_S1, internal, instance=Concept-D101-as-cut, generate
 7885,  7909,     1
*Surface, type=ELEMENT, name=_core-sleeve_ssm_13, internal
__core-sleeve_ssm_13_S1, S1
*Elset, elset=__core-sleeve_ssm_14_S4, internal, instance=Concept-D101-as-cut, generate
 5140,  5792,     4
*Surface, type=ELEMENT, name=_core-sleeve_ssm_14, internal
__core-sleeve_ssm_14_S4, S4
*Elset, elset=__core-sleeve_ssm_15_S1, internal, instance=Concept-D101-as-cut, generate
 6449,  6473,     1
*Surface, type=ELEMENT, name=_core-sleeve_ssm_15, internal
__core-sleeve_ssm_15_S1, S1
*Elset, elset=__core-sleeve_ssm_16_S1, internal, instance=Concept-D101-as-cut, generate
 4381,  4405,     1
*Surface, type=ELEMENT, name=_core-sleeve_ssm_16, internal
__core-sleeve_ssm_16_S1, S1
*Elset, elset=__core-sleeve_ssm_17_S6, internal, instance=Concept-D101-as-cut, generate
 5793,  6445,     4
*Surface, type=ELEMENT, name=_core-sleeve_ssm_17, internal
__core-sleeve_ssm_17_S6, S6
*Elset, elset=__core-sleeve_ssm_18_S1, internal, instance=Concept-D101-as-cut, generate
 4281,  4305,     1
*Surface, type=ELEMENT, name=_core-sleeve_ssm_18, internal
__core-sleeve_ssm_18_S1, S1
*Elset, elset=__core-sleeve_ssm_19_S1, internal, instance=Concept-D101-as-cut, generate
 4081,  4105,     1
*Surface, type=ELEMENT, name=_core-sleeve_ssm_19, internal
__core-sleeve_ssm_19_S1, S1
*Elset, elset=__core-sleeve_ssm_20_S4, internal, instance=Concept-D101-as-cut, generate
 1516,  2168,     4
*Surface, type=ELEMENT, name=_core-sleeve_ssm_20, internal
__core-sleeve_ssm_20_S4, S4
*Elset, elset=__core-sleeve_ssm_21_S1, internal, instance=Concept-D101-as-cut, generate
 4181,  4205,     1
*Surface, type=ELEMENT, name=_core-sleeve_ssm_21, internal
__core-sleeve_ssm_21_S1, S1
*Elset, elset=__core-sleeve_ssm_22_S1, internal, instance=Concept-D101-as-cut, generate
 3881,  3905,     1
*Surface, type=ELEMENT, name=_core-sleeve_ssm_22, internal
__core-sleeve_ssm_22_S1, S1
*Elset, elset=__core-sleeve_ssm_23_S6, internal, instance=Concept-D101-as-cut, generate
 2169,  2821,     4
*Surface, type=ELEMENT, name=_core-sleeve_ssm_23, internal
__core-sleeve_ssm_23_S6, S6
*Elset, elset=__core-sleeve_ssm_24_S1, internal, instance=Concept-D101-as-cut, generate
 3781,  3805,     1
*Surface, type=ELEMENT, name=_core-sleeve_ssm_24, internal
__core-sleeve_ssm_24_S1, S1
*Elset, elset=__core-sleeve_ssm_25_S1, internal, instance=Concept-D101-as-cut, generate
 3981,  4005,     1
*Surface, type=ELEMENT, name=_core-sleeve_ssm_25, internal
__core-sleeve_ssm_25_S1, S1
*Elset, elset=__core-sleeve_ssm_26_S4, internal, instance=Concept-D101-as-cut, generate
 2828,  3480,     4
*Surface, type=ELEMENT, name=_core-sleeve_ssm_26, internal
__core-sleeve_ssm_26_S4, S4
*Elset, elset=__core-sleeve_ssm_27_S2, internal, instance=Concept-D101-as-cut, generate
 732,  756,    1
*Surface, type=ELEMENT, name=_core-sleeve_ssm_27, internal
__core-sleeve_ssm_27_S2, S2
*Elset, elset=__core-sleeve_ssm_28_S6, internal, instance=Concept-D101-as-cut, generate
 9721,  9797,     4
*Surface, type=ELEMENT, name=_core-sleeve_ssm_28, internal
__core-sleeve_ssm_28_S6, S6
*Elset, elset=__core-sleeve_ssm_29_S2, internal, instance=Concept-D101-as-cut, generate
 3656,  3680,     1
*Surface, type=ELEMENT, name=_core-sleeve_ssm_29, internal
__core-sleeve_ssm_29_S2, S2
*Elset, elset=__core-sleeve_ssm_30_S1, internal, instance=Concept-D101-as-cut, generate
 3681,  3705,     1
*Surface, type=ELEMENT, name=_core-sleeve_ssm_30, internal
__core-sleeve_ssm_30_S1, S1
*Elset, elset=__core-sleeve_ssm_31_S6, internal, instance=Concept-D101-as-cut, generate
  757,  1409,     4
*Surface, type=ELEMENT, name=_core-sleeve_ssm_31, internal
__core-sleeve_ssm_31_S6, S6
*Elset, elset=__core-sleeve_ssm_32_S2, internal, instance=Concept-D101-as-cut, generate
 3556,  3580,     1
*Surface, type=ELEMENT, name=_core-sleeve_ssm_32, internal
__core-sleeve_ssm_32_S2, S2
*Elset, elset=__core-sleeve_ssm_33_S2, internal, instance=Concept-D101-as-cut, generate
 1488,  1512,     1
*Surface, type=ELEMENT, name=_core-sleeve_ssm_33, internal
__core-sleeve_ssm_33_S2, S2
*Elset, elset=__core-sleeve_ssm_34_S4, internal, instance=Concept-D101-as-cut, generate
   4,  656,    4
*Surface, type=ELEMENT, name=_core-sleeve_ssm_34, internal
__core-sleeve_ssm_34_S4, S4
*Elset, elset=__core-sleeve_ssm_35_S2, internal, instance=Concept-D101-as-cut, generate
 9571,  9600,     1
*Surface, type=ELEMENT, name=_core-sleeve_ssm_35, internal
__core-sleeve_ssm_35_S2, S2
*Elset, elset=__exp-cyl_msm_1_SPOS, internal, instance=exp-cyl-1, generate
  1,  27,   1
*Surface, type=ELEMENT, name=_exp-cyl_msm_1, internal
__exp-cyl_msm_1_SPOS, SPOS
*Elset, elset=__exp-cyl_msm_2_SPOS, internal, instance=exp-cyl-1, generate
 28,  54,   1
*Surface, type=ELEMENT, name=_exp-cyl_msm_2, internal
__exp-cyl_msm_2_SPOS, SPOS
*Elset, elset=__exp-cyl_msm_3_SPOS, internal, instance=exp-cyl-1, generate
 55,  81,   1
*Surface, type=ELEMENT, name=_exp-cyl_msm_3, internal
__exp-cyl_msm_3_SPOS, SPOS
*Elset, elset=__exp-cyl_msm_4_SPOS, internal, instance=exp-cyl-1, generate
  82,  108,    1
*Surface, type=ELEMENT, name=_exp-cyl_msm_4, internal
__exp-cyl_msm_4_SPOS, SPOS
*Elset, elset=__exp-cyl_ssm_1_S2, internal, instance=Concept-D101-as-cut, generate
 9885,  9912,     1
*Surface, type=ELEMENT, name=_exp-cyl_ssm_1, internal
__exp-cyl_ssm_1_S2, S2
*Elset, elset=__exp-cyl_ssm_2_S2, internal, instance=Concept-D101-as-cut, generate
 9441,  9480,     1
*Surface, type=ELEMENT, name=_exp-cyl_ssm_2, internal
__exp-cyl_ssm_2_S2, S2
*Elset, elset=__exp-cyl_ssm_3_S4, internal, instance=Concept-D101-as-cut, generate
 9724,  9800,     4
*Surface, type=ELEMENT, name=_exp-cyl_ssm_3, internal
__exp-cyl_ssm_3_S4, S4
*Elset, elset=__exp-cyl_ssm_4_S2, internal, instance=Concept-D101-as-cut, generate
 9691,  9720,     1
*Surface, type=ELEMENT, name=_exp-cyl_ssm_4, internal
__exp-cyl_ssm_4_S2, S2
*Elset, elset=__exp-cyl_ssm_5_S2, internal, instance=Concept-D101-as-cut, generate
 8060,  8084,     1
*Surface, type=ELEMENT, name=_exp-cyl_ssm_5, internal
__exp-cyl_ssm_5_S2, S2
*Elset, elset=__exp-cyl_ssm_6_S2, internal, instance=Concept-D101-as-cut, generate
 8160,  8184,     1
*Surface, type=ELEMENT, name=_exp-cyl_ssm_6, internal
__exp-cyl_ssm_6_S2, S2
*Elset, elset=__exp-cyl_ssm_7_S4, internal, instance=Concept-D101-as-cut, generate
 8188,  9320,     4
*Surface, type=ELEMENT, name=_exp-cyl_ssm_7, internal
__exp-cyl_ssm_7_S4, S4
*Elset, elset=__exp-cyl_ssm_8_S2, internal, instance=Concept-D101-as-cut, generate
 7960,  7984,     1
*Surface, type=ELEMENT, name=_exp-cyl_ssm_8, internal
__exp-cyl_ssm_8_S2, S2
*Elset, elset=__exp-cyl_ssm_9_S2, internal, instance=Concept-D101-as-cut, generate
 7860,  7884,     1
*Surface, type=ELEMENT, name=_exp-cyl_ssm_9, internal
__exp-cyl_ssm_9_S2, S2
*Elset, elset=__exp-cyl_ssm_10_S6, internal, instance=Concept-D101-as-cut, generate
 6649,  7781,     4
*Surface, type=ELEMENT, name=_exp-cyl_ssm_10, internal
__exp-cyl_ssm_10_S6, S6
*Elset, elset=__exp-cyl_ssm_11_S2, internal, instance=Concept-D101-as-cut, generate
 6524,  6548,     1
*Surface, type=ELEMENT, name=_exp-cyl_ssm_11, internal
__exp-cyl_ssm_11_S2, S2
*Elset, elset=__exp-cyl_ssm_12_S2, internal, instance=Concept-D101-as-cut, generate
 6624,  6648,     1
*Surface, type=ELEMENT, name=_exp-cyl_ssm_12, internal
__exp-cyl_ssm_12_S2, S2
*Elset, elset=__exp-cyl_ssm_13_S4, internal, instance=Concept-D101-as-cut, generate
 4484,  5136,     4
*Surface, type=ELEMENT, name=_exp-cyl_ssm_13, internal
__exp-cyl_ssm_13_S4, S4
*Elset, elset=__exp-cyl_ssm_14_S2, internal, instance=Concept-D101-as-cut, generate
 4456,  4480,     1
*Surface, type=ELEMENT, name=_exp-cyl_ssm_14, internal
__exp-cyl_ssm_14_S2, S2
*Elset, elset=__exp-cyl_ssm_15_S2, internal, instance=Concept-D101-as-cut, generate
 4156,  4180,     1
*Surface, type=ELEMENT, name=_exp-cyl_ssm_15, internal
__exp-cyl_ssm_15_S2, S2
*Elset, elset=__exp-cyl_ssm_16_S6, internal, instance=Concept-D101-as-cut, generate
 5137,  5789,     4
*Surface, type=ELEMENT, name=_exp-cyl_ssm_16, internal
__exp-cyl_ssm_16_S6, S6
*Elset, elset=__exp-cyl_ssm_17_S2, internal, instance=Concept-D101-as-cut, generate
 4256,  4280,     1
*Surface, type=ELEMENT, name=_exp-cyl_ssm_17, internal
__exp-cyl_ssm_17_S2, S2
*Elset, elset=__exp-cyl_ssm_18_S2, internal, instance=Concept-D101-as-cut, generate
 4356,  4380,     1
*Surface, type=ELEMENT, name=_exp-cyl_ssm_18, internal
__exp-cyl_ssm_18_S2, S2
*Elset, elset=__exp-cyl_ssm_19_S4, internal, instance=Concept-D101-as-cut, generate
 5796,  6448,     4
*Surface, type=ELEMENT, name=_exp-cyl_ssm_19, internal
__exp-cyl_ssm_19_S4, S4
*Elset, elset=__exp-cyl_ssm_20_S2, internal, instance=Concept-D101-as-cut, generate
 3956,  3980,     1
*Surface, type=ELEMENT, name=_exp-cyl_ssm_20, internal
__exp-cyl_ssm_20_S2, S2
*Elset, elset=__exp-cyl_ssm_21_S2, internal, instance=Concept-D101-as-cut, generate
 4056,  4080,     1
*Surface, type=ELEMENT, name=_exp-cyl_ssm_21, internal
__exp-cyl_ssm_21_S2, S2
*Elset, elset=__exp-cyl_ssm_22_S6, internal, instance=Concept-D101-as-cut, generate
 1513,  2165,     4
*Surface, type=ELEMENT, name=_exp-cyl_ssm_22, internal
__exp-cyl_ssm_22_S6, S6
*Elset, elset=__exp-cyl_ssm_23_S2, internal, instance=Concept-D101-as-cut, generate
 3756,  3780,     1
*Surface, type=ELEMENT, name=_exp-cyl_ssm_23, internal
__exp-cyl_ssm_23_S2, S2
*Elset, elset=__exp-cyl_ssm_24_S2, internal, instance=Concept-D101-as-cut, generate
 3856,  3880,     1
*Surface, type=ELEMENT, name=_exp-cyl_ssm_24, internal
__exp-cyl_ssm_24_S2, S2
*Elset, elset=__exp-cyl_ssm_25_S4, internal, instance=Concept-D101-as-cut, generate
 2172,  2824,     4
*Surface, type=ELEMENT, name=_exp-cyl_ssm_25, internal
__exp-cyl_ssm_25_S4, S4
*Elset, elset=__exp-cyl_ssm_26_S1, internal, instance=Concept-D101-as-cut, generate
 1413,  1437,     1
*Surface, type=ELEMENT, name=_exp-cyl_ssm_26, internal
__exp-cyl_ssm_26_S1, S1
*Elset, elset=__exp-cyl_ssm_27_S1, internal, instance=Concept-D101-as-cut, generate
 9481,  9510,     1
*Surface, type=ELEMENT, name=_exp-cyl_ssm_27, internal
__exp-cyl_ssm_27_S1, S1
*Elset, elset=__exp-cyl_ssm_28_S1, internal, instance=Concept-D101-as-cut, generate
 3481,  3505,     1
*Surface, type=ELEMENT, name=_exp-cyl_ssm_28, internal
__exp-cyl_ssm_28_S1, S1
*Elset, elset=__exp-cyl_ssm_29_S1, internal, instance=Concept-D101-as-cut, generate
 3581,  3605,     1
*Surface, type=ELEMENT, name=_exp-cyl_ssm_29, internal
__exp-cyl_ssm_29_S1, S1
*Elset, elset=__exp-cyl_ssm_30_S6, internal, instance=Concept-D101-as-cut, generate
 2825,  3477,     4
*Surface, type=ELEMENT, name=_exp-cyl_ssm_30, internal
__exp-cyl_ssm_30_S6, S6
*Elset, elset=__exp-cyl_ssm_31_S1, internal, instance=Concept-D101-as-cut, generate
 657,  681,    1
*Surface, type=ELEMENT, name=_exp-cyl_ssm_31, internal
__exp-cyl_ssm_31_S1, S1
*Elset, elset=__exp-cyl_ssm_32_S6, internal, instance=Concept-D101-as-cut, generate
   1,  653,    4
*Surface, type=ELEMENT, name=_exp-cyl_ssm_32, internal
__exp-cyl_ssm_32_S6, S6
*Elset, elset=__exp-cyl_ssm_33_S4, internal, instance=Concept-D101-as-cut, generate
 9916,  9928,     4
*Surface, type=ELEMENT, name=_exp-cyl_ssm_33, internal
__exp-cyl_ssm_33_S4, S4
*Elset, elset=__exp-cyl_ssm_34_S4, internal, instance=Concept-D101-as-cut, generate
  760,  1412,     4
*Surface, type=ELEMENT, name=_exp-cyl_ssm_34, internal
__exp-cyl_ssm_34_S4, S4
*Elset, elset=__large-dia-sleeve_msm_1_SNEG, internal, instance=large-dia-sleeve-1, generate
  1,  33,   1
*Surface, type=ELEMENT, name=_large-dia-sleeve_msm_1, internal
__large-dia-sleeve_msm_1_SNEG, SNEG
*Elset, elset=__large-dia-sleeve_msm_2_SNEG, internal, instance=large-dia-sleeve-1, generate
 34,  66,   1
*Surface, type=ELEMENT, name=_large-dia-sleeve_msm_2, internal
__large-dia-sleeve_msm_2_SNEG, SNEG
*Elset, elset=__large-dia-sleeve_ssm_1_S6, internal, instance=Concept-D101-as-cut, generate
 9913,  9925,     4
*Surface, type=ELEMENT, name=_large-dia-sleeve_ssm_1, internal
__large-dia-sleeve_ssm_1_S6, S6
*Elset, elset=__large-dia-sleeve_ssm_2_S1, internal, instance=Concept-D101-as-cut, generate
 9321,  9350,     1
*Surface, type=ELEMENT, name=_large-dia-sleeve_ssm_2, internal
__large-dia-sleeve_ssm_2_S1, S1
*Elset, elset=__large-dia-sleeve_ssm_3_S1, internal, instance=Concept-D101-as-cut, generate
 9601,  9630,     1
*Surface, type=ELEMENT, name=_large-dia-sleeve_ssm_3, internal
__large-dia-sleeve_ssm_3_S1, S1
*Elset, elset=__large-dia-sleeve_ssm_4_S1, internal, instance=Concept-D101-as-cut, generate
 9801,  9828,     1
*Surface, type=ELEMENT, name=_large-dia-sleeve_ssm_4, internal
__large-dia-sleeve_ssm_4_S1, S1
*Elset, elset=__large-dia-sleeve_ssm_5_S6, internal, instance=Concept-D101-as-cut, generate
 8185,  9317,     4
*Surface, type=ELEMENT, name=_large-dia-sleeve_ssm_5, internal
__large-dia-sleeve_ssm_5_S6, S6
*Elset, elset=__large-dia-sleeve_ssm_6_S1, internal, instance=Concept-D101-as-cut, generate
 8085,  8109,     1
*Surface, type=ELEMENT, name=_large-dia-sleeve_ssm_6, internal
__large-dia-sleeve_ssm_6_S1, S1
*Elset, elset=__large-dia-sleeve_ssm_7_S1, internal, instance=Concept-D101-as-cut, generate
 9351,  9360,     1
*Surface, type=ELEMENT, name=_large-dia-sleeve_ssm_7, internal
__large-dia-sleeve_ssm_7_S1, S1
*Elset, elset=__large-dia-sleeve_ssm_8_S4, internal, instance=Concept-D101-as-cut, generate
 6652,  7784,     4
*Surface, type=ELEMENT, name=_large-dia-sleeve_ssm_8, internal
__large-dia-sleeve_ssm_8_S4, S4
*Elset, elset=__large-dia-sleeve_ssm_9_S1, internal, instance=Concept-D101-as-cut, generate
 7785,  7809,     1
*Surface, type=ELEMENT, name=_large-dia-sleeve_ssm_9, internal
__large-dia-sleeve_ssm_9_S1, S1
*Elset, elset=__large-dia-sleeve_ssm_10_S1, internal, instance=Concept-D101-as-cut, generate
 7985,  8009,     1
*Surface, type=ELEMENT, name=_large-dia-sleeve_ssm_10, internal
__large-dia-sleeve_ssm_10_S1, S1
*Elset, elset=__large-dia-sleeve_ssm_11_S6, internal, instance=Concept-D101-as-cut, generate
 4481,  5133,     4
*Surface, type=ELEMENT, name=_large-dia-sleeve_ssm_11, internal
__large-dia-sleeve_ssm_11_S6, S6
*Elset, elset=__large-dia-sleeve_ssm_12_S1, internal, instance=Concept-D101-as-cut, generate
 6549,  6573,     1
*Surface, type=ELEMENT, name=_large-dia-sleeve_ssm_12, internal
__large-dia-sleeve_ssm_12_S1, S1
*Elset, elset=__large-dia-sleeve_ssm_13_S1, internal, instance=Concept-D101-as-cut, generate
 7885,  7909,     1
*Surface, type=ELEMENT, name=_large-dia-sleeve_ssm_13, internal
__large-dia-sleeve_ssm_13_S1, S1
*Elset, elset=__large-dia-sleeve_ssm_14_S4, internal, instance=Concept-D101-as-cut, generate
 5140,  5792,     4
*Surface, type=ELEMENT, name=_large-dia-sleeve_ssm_14, internal
__large-dia-sleeve_ssm_14_S4, S4
*Elset, elset=__large-dia-sleeve_ssm_15_S1, internal, instance=Concept-D101-as-cut, generate
 6449,  6473,     1
*Surface, type=ELEMENT, name=_large-dia-sleeve_ssm_15, internal
__large-dia-sleeve_ssm_15_S1, S1
*Elset, elset=__large-dia-sleeve_ssm_16_S1, internal, instance=Concept-D101-as-cut, generate
 4381,  4405,     1
*Surface, type=ELEMENT, name=_large-dia-sleeve_ssm_16, internal
__large-dia-sleeve_ssm_16_S1, S1
*Elset, elset=__large-dia-sleeve_ssm_17_S6, internal, instance=Concept-D101-as-cut, generate
 5793,  6445,     4
*Surface, type=ELEMENT, name=_large-dia-sleeve_ssm_17, internal
__large-dia-sleeve_ssm_17_S6, S6
*Elset, elset=__large-dia-sleeve_ssm_18_S1, internal, instance=Concept-D101-as-cut, generate
 4281,  4305,     1
*Surface, type=ELEMENT, name=_large-dia-sleeve_ssm_18, internal
__large-dia-sleeve_ssm_18_S1, S1
*Elset, elset=__large-dia-sleeve_ssm_19_S1, internal, instance=Concept-D101-as-cut, generate
 4081,  4105,     1
*Surface, type=ELEMENT, name=_large-dia-sleeve_ssm_19, internal
__large-dia-sleeve_ssm_19_S1, S1
*Elset, elset=__large-dia-sleeve_ssm_20_S4, internal, instance=Concept-D101-as-cut, generate
 1516,  2168,     4
*Surface, type=ELEMENT, name=_large-dia-sleeve_ssm_20, internal
__large-dia-sleeve_ssm_20_S4, S4
*Elset, elset=__large-dia-sleeve_ssm_21_S1, internal, instance=Concept-D101-as-cut, generate
 4181,  4205,     1
*Surface, type=ELEMENT, name=_large-dia-sleeve_ssm_21, internal
__large-dia-sleeve_ssm_21_S1, S1
*Elset, elset=__large-dia-sleeve_ssm_22_S1, internal, instance=Concept-D101-as-cut, generate
 3881,  3905,     1
*Surface, type=ELEMENT, name=_large-dia-sleeve_ssm_22, internal
__large-dia-sleeve_ssm_22_S1, S1
*Elset, elset=__large-dia-sleeve_ssm_23_S6, internal, instance=Concept-D101-as-cut, generate
 2169,  2821,     4
*Surface, type=ELEMENT, name=_large-dia-sleeve_ssm_23, internal
__large-dia-sleeve_ssm_23_S6, S6
*Elset, elset=__large-dia-sleeve_ssm_24_S1, internal, instance=Concept-D101-as-cut, generate
 3781,  3805,     1
*Surface, type=ELEMENT, name=_large-dia-sleeve_ssm_24, internal
__large-dia-sleeve_ssm_24_S1, S1
*Elset, elset=__large-dia-sleeve_ssm_25_S1, internal, instance=Concept-D101-as-cut, generate
 3981,  4005,     1
*Surface, type=ELEMENT, name=_large-dia-sleeve_ssm_25, internal
__large-dia-sleeve_ssm_25_S1, S1
*Elset, elset=__large-dia-sleeve_ssm_26_S4, internal, instance=Concept-D101-as-cut, generate
 2828,  3480,     4
*Surface, type=ELEMENT, name=_large-dia-sleeve_ssm_26, internal
__large-dia-sleeve_ssm_26_S4, S4
*Elset, elset=__large-dia-sleeve_ssm_27_S2, internal, instance=Concept-D101-as-cut, generate
 732,  756,    1
*Surface, type=ELEMENT, name=_large-dia-sleeve_ssm_27, internal
__large-dia-sleeve_ssm_27_S2, S2
*Elset, elset=__large-dia-sleeve_ssm_28_S6, internal, instance=Concept-D101-as-cut, generate
 9721,  9797,     4
*Surface, type=ELEMENT, name=_large-dia-sleeve_ssm_28, internal
__large-dia-sleeve_ssm_28_S6, S6
*Elset, elset=__large-dia-sleeve_ssm_29_S2, internal, instance=Concept-D101-as-cut, generate
 3656,  3680,     1
*Surface, type=ELEMENT, name=_large-dia-sleeve_ssm_29, internal
__large-dia-sleeve_ssm_29_S2, S2
*Elset, elset=__large-dia-sleeve_ssm_30_S1, internal, instance=Concept-D101-as-cut, generate
 3681,  3705,     1
*Surface, type=ELEMENT, name=_large-dia-sleeve_ssm_30, internal
__large-dia-sleeve_ssm_30_S1, S1
*Elset, elset=__large-dia-sleeve_ssm_31_S6, internal, instance=Concept-D101-as-cut, generate
  757,  1409,     4
*Surface, type=ELEMENT, name=_large-dia-sleeve_ssm_31, internal
__large-dia-sleeve_ssm_31_S6, S6
*Elset, elset=__large-dia-sleeve_ssm_32_S2, internal, instance=Concept-D101-as-cut, generate
 3556,  3580,     1
*Surface, type=ELEMENT, name=_large-dia-sleeve_ssm_32, internal
__large-dia-sleeve_ssm_32_S2, S2
*Elset, elset=__large-dia-sleeve_ssm_33_S2, internal, instance=Concept-D101-as-cut, generate
 1488,  1512,     1
*Surface, type=ELEMENT, name=_large-dia-sleeve_ssm_33, internal
__large-dia-sleeve_ssm_33_S2, S2
*Elset, elset=__large-dia-sleeve_ssm_34_S4, internal, instance=Concept-D101-as-cut, generate
   4,  656,    4
*Surface, type=ELEMENT, name=_large-dia-sleeve_ssm_34, internal
__large-dia-sleeve_ssm_34_S4, S4
*Elset, elset=__large-dia-sleeve_ssm_35_S2, internal, instance=Concept-D101-as-cut, generate
 9571,  9600,     1
*Surface, type=ELEMENT, name=_large-dia-sleeve_ssm_35, internal
__large-dia-sleeve_ssm_35_S2, S2
*Elset, elset=__slide-core_ssm_1_S2, internal, instance=Concept-D101-as-cut, generate
 9885,  9912,     1
*Surface, type=ELEMENT, name=_slide-core_ssm_1, internal
__slide-core_ssm_1_S2, S2
*Elset, elset=__slide-core_ssm_2_S2, internal, instance=Concept-D101-as-cut, generate
 9441,  9480,     1
*Surface, type=ELEMENT, name=_slide-core_ssm_2, internal
__slide-core_ssm_2_S2, S2
*Elset, elset=__slide-core_ssm_3_S4, internal, instance=Concept-D101-as-cut, generate
 9724,  9800,     4
*Surface, type=ELEMENT, name=_slide-core_ssm_3, internal
__slide-core_ssm_3_S4, S4
*Elset, elset=__slide-core_ssm_4_S2, internal, instance=Concept-D101-as-cut, generate
 9691,  9720,     1
*Surface, type=ELEMENT, name=_slide-core_ssm_4, internal
__slide-core_ssm_4_S2, S2
*Elset, elset=__slide-core_ssm_5_S2, internal, instance=Concept-D101-as-cut, generate
 8060,  8084,     1
*Surface, type=ELEMENT, name=_slide-core_ssm_5, internal
__slide-core_ssm_5_S2, S2
*Elset, elset=__slide-core_ssm_6_S2, internal, instance=Concept-D101-as-cut, generate
 8160,  8184,     1
*Surface, type=ELEMENT, name=_slide-core_ssm_6, internal
__slide-core_ssm_6_S2, S2
*Elset, elset=__slide-core_ssm_7_S4, internal, instance=Concept-D101-as-cut, generate
 8188,  9320,     4
*Surface, type=ELEMENT, name=_slide-core_ssm_7, internal
__slide-core_ssm_7_S4, S4
*Elset, elset=__slide-core_ssm_8_S2, internal, instance=Concept-D101-as-cut, generate
 7960,  7984,     1
*Surface, type=ELEMENT, name=_slide-core_ssm_8, internal
__slide-core_ssm_8_S2, S2
*Elset, elset=__slide-core_ssm_9_S2, internal, instance=Concept-D101-as-cut, generate
 7860,  7884,     1
*Surface, type=ELEMENT, name=_slide-core_ssm_9, internal
__slide-core_ssm_9_S2, S2
*Elset, elset=__slide-core_ssm_10_S6, internal, instance=Concept-D101-as-cut, generate
 6649,  7781,     4
*Surface, type=ELEMENT, name=_slide-core_ssm_10, internal
__slide-core_ssm_10_S6, S6
*Elset, elset=__slide-core_ssm_11_S2, internal, instance=Concept-D101-as-cut, generate
 6524,  6548,     1
*Surface, type=ELEMENT, name=_slide-core_ssm_11, internal
__slide-core_ssm_11_S2, S2
*Elset, elset=__slide-core_ssm_12_S2, internal, instance=Concept-D101-as-cut, generate
 6624,  6648,     1
*Surface, type=ELEMENT, name=_slide-core_ssm_12, internal
__slide-core_ssm_12_S2, S2
*Elset, elset=__slide-core_ssm_13_S4, internal, instance=Concept-D101-as-cut, generate
 4484,  5136,     4
*Surface, type=ELEMENT, name=_slide-core_ssm_13, internal
__slide-core_ssm_13_S4, S4
*Elset, elset=__slide-core_ssm_14_S2, internal, instance=Concept-D101-as-cut, generate
 4456,  4480,     1
*Surface, type=ELEMENT, name=_slide-core_ssm_14, internal
__slide-core_ssm_14_S2, S2
*Elset, elset=__slide-core_ssm_15_S2, internal, instance=Concept-D101-as-cut, generate
 4156,  4180,     1
*Surface, type=ELEMENT, name=_slide-core_ssm_15, internal
__slide-core_ssm_15_S2, S2
*Elset, elset=__slide-core_ssm_16_S6, internal, instance=Concept-D101-as-cut, generate
 5137,  5789,     4
*Surface, type=ELEMENT, name=_slide-core_ssm_16, internal
__slide-core_ssm_16_S6, S6
*Elset, elset=__slide-core_ssm_17_S2, internal, instance=Concept-D101-as-cut, generate
 4256,  4280,     1
*Surface, type=ELEMENT, name=_slide-core_ssm_17, internal
__slide-core_ssm_17_S2, S2
*Elset, elset=__slide-core_ssm_18_S2, internal, instance=Concept-D101-as-cut, generate
 4356,  4380,     1
*Surface, type=ELEMENT, name=_slide-core_ssm_18, internal
__slide-core_ssm_18_S2, S2
*Elset, elset=__slide-core_ssm_19_S4, internal, instance=Concept-D101-as-cut, generate
 5796,  6448,     4
*Surface, type=ELEMENT, name=_slide-core_ssm_19, internal
__slide-core_ssm_19_S4, S4
*Elset, elset=__slide-core_ssm_20_S2, internal, instance=Concept-D101-as-cut, generate
 3956,  3980,     1
*Surface, type=ELEMENT, name=_slide-core_ssm_20, internal
__slide-core_ssm_20_S2, S2
*Elset, elset=__slide-core_ssm_21_S2, internal, instance=Concept-D101-as-cut, generate
 4056,  4080,     1
*Surface, type=ELEMENT, name=_slide-core_ssm_21, internal
__slide-core_ssm_21_S2, S2
*Elset, elset=__slide-core_ssm_22_S6, internal, instance=Concept-D101-as-cut, generate
 1513,  2165,     4
*Surface, type=ELEMENT, name=_slide-core_ssm_22, internal
__slide-core_ssm_22_S6, S6
*Elset, elset=__slide-core_ssm_23_S2, internal, instance=Concept-D101-as-cut, generate
 3756,  3780,     1
*Surface, type=ELEMENT, name=_slide-core_ssm_23, internal
__slide-core_ssm_23_S2, S2
*Elset, elset=__slide-core_ssm_24_S2, internal, instance=Concept-D101-as-cut, generate
 3856,  3880,     1
*Surface, type=ELEMENT, name=_slide-core_ssm_24, internal
__slide-core_ssm_24_S2, S2
*Elset, elset=__slide-core_ssm_25_S4, internal, instance=Concept-D101-as-cut, generate
 2172,  2824,     4
*Surface, type=ELEMENT, name=_slide-core_ssm_25, internal
__slide-core_ssm_25_S4, S4
*Elset, elset=__slide-core_ssm_26_S1, internal, instance=Concept-D101-as-cut, generate
 1413,  1437,     1
*Surface, type=ELEMENT, name=_slide-core_ssm_26, internal
__slide-core_ssm_26_S1, S1
*Elset, elset=__slide-core_ssm_27_S1, internal, instance=Concept-D101-as-cut, generate
 9481,  9510,     1
*Surface, type=ELEMENT, name=_slide-core_ssm_27, internal
__slide-core_ssm_27_S1, S1
*Elset, elset=__slide-core_ssm_28_S1, internal, instance=Concept-D101-as-cut, generate
 3481,  3505,     1
*Surface, type=ELEMENT, name=_slide-core_ssm_28, internal
__slide-core_ssm_28_S1, S1
*Elset, elset=__slide-core_ssm_29_S1, internal, instance=Concept-D101-as-cut, generate
 3581,  3605,     1
*Surface, type=ELEMENT, name=_slide-core_ssm_29, internal
__slide-core_ssm_29_S1, S1
*Elset, elset=__slide-core_ssm_30_S6, internal, instance=Concept-D101-as-cut, generate
 2825,  3477,     4
*Surface, type=ELEMENT, name=_slide-core_ssm_30, internal
__slide-core_ssm_30_S6, S6
*Elset, elset=__slide-core_ssm_31_S1, internal, instance=Concept-D101-as-cut, generate
 657,  681,    1
*Surface, type=ELEMENT, name=_slide-core_ssm_31, internal
__slide-core_ssm_31_S1, S1
*Elset, elset=__slide-core_ssm_32_S6, internal, instance=Concept-D101-as-cut, generate
   1,  653,    4
*Surface, type=ELEMENT, name=_slide-core_ssm_32, internal
__slide-core_ssm_32_S6, S6
*Elset, elset=__slide-core_ssm_33_S4, internal, instance=Concept-D101-as-cut, generate
 9916,  9928,     4
*Surface, type=ELEMENT, name=_slide-core_ssm_33, internal
__slide-core_ssm_33_S4, S4
*Elset, elset=__slide-core_ssm_34_S4, internal, instance=Concept-D101-as-cut, generate
  760,  1412,     4
*Surface, type=ELEMENT, name=_slide-core_ssm_34, internal
__slide-core_ssm_34_S4, S4
*End Assembly
**
** ELEMENT CONTROLS
**
*Section Controls, name=EC-1, hourglass=ENHANCED
1., 1., 1.
**
** MATERIALS
**
*Material, name=ABQ_SUPER_ELASTIC_PLASTIC_Af19
*Depvar
     31,
*User Material, constants=32, unsymm
62857.,  0.33,27778.,  0.33, 0.046,  6.52,  460.,  500.
   37.,  6.52,  240.,  210.,  690.,    0.,    0.,    8.
 1170., 0.087, 1240., 0.091, 1320., 0.095, 1370., 0.099
 1440., 0.106, 1460., 0.112, 1500.,  0.12, 1510., 0.128
**
** INTERACTION PROPERTIES
**
*Surface Interaction, name=AL
1.,
*Surface Behavior, augmented Lagrange
, , 1e-05
*Surface Smoothing, name=core-sleeve
, _core-sleeve_msm_1, CIRCUMFERENTIAL, 5., 3.7494e-33, -61., 5., -6.84228e-49, -60.
, _core-sleeve_msm_2, TOROIDAL, 5., 7.4988e-33, -62., 5., 3.7494e-33, -61., 19.
, _core-sleeve_msm_3, TOROIDAL, 5., 5.24916e-32, -74., 5., 4.87422e-32, -73., 10.
, _core-sleeve_msm_4, TOROIDAL, 5., 5.24916e-32, -74., 5., 4.87422e-32, -73., 10.
, _core-sleeve_msm_5, TOROIDAL, 5., 7.4988e-33, -62., 5., 3.7494e-33, -61., 19.
, _core-sleeve_msm_6, CIRCUMFERENTIAL, 5., 3.7494e-33, -61., 5., -6.84228e-49, -60.
_core-sleeve_ssm_1, , CIRCUMFERENTIAL, -6.12323e-16, 0., 8.8, -5.51091e-16, 0., 7.8
_core-sleeve_ssm_2, , CIRCUMFERENTIAL, -6.12323e-16, 0., 8.8, -5.51091e-16, 0., 7.8
_core-sleeve_ssm_3, , CIRCUMFERENTIAL, -6.12323e-16, 0., 8.8, -5.51091e-16, 0., 7.8
_core-sleeve_ssm_4, , CIRCUMFERENTIAL, -6.12323e-16, 0., 8.8, -5.51091e-16, 0., 7.8
_core-sleeve_ssm_5, , CIRCUMFERENTIAL, -6.12323e-16, 0., 8.8, -5.51091e-16, 0., 7.8
_core-sleeve_ssm_6, , CIRCUMFERENTIAL, -6.12323e-16, 0., 8.8, -5.51091e-16, 0., 7.8
_core-sleeve_ssm_7, , CIRCUMFERENTIAL, -6.12323e-16, 0., 8.8, -5.51091e-16, 0., 7.8
_core-sleeve_ssm_8, , CIRCUMFERENTIAL, -6.12323e-16, 0., 8.8, -5.51091e-16, 0., 7.8
_core-sleeve_ssm_9, , CIRCUMFERENTIAL, -6.12323e-16, 0., 8.8, -5.51091e-16, 0., 7.8
_core-sleeve_ssm_10, , CIRCUMFERENTIAL, -6.12323e-16, 0., 8.8, -5.51091e-16, 0., 7.8
_core-sleeve_ssm_11, , CIRCUMFERENTIAL, -6.12323e-16, 0., 8.8, -5.51091e-16, 0., 7.8
_core-sleeve_ssm_12, , CIRCUMFERENTIAL, -6.12323e-16, 0., 8.8, -5.51091e-16, 0., 7.8
_core-sleeve_ssm_13, , CIRCUMFERENTIAL, -6.12323e-16, 0., 8.8, -5.51091e-16, 0., 7.8
_core-sleeve_ssm_14, , CIRCUMFERENTIAL, -6.12323e-16, 0., 8.8, -5.51091e-16, 0., 7.8
_core-sleeve_ssm_15, , CIRCUMFERENTIAL, -6.12323e-16, 0., 8.8, -5.51091e-16, 0., 7.8
_core-sleeve_ssm_16, , CIRCUMFERENTIAL, -6.12323e-16, 0., 8.8, -5.51091e-16, 0., 7.8
_core-sleeve_ssm_17, , CIRCUMFERENTIAL, -6.12323e-16, 0., 8.8, -5.51091e-16, 0., 7.8
_core-sleeve_ssm_18, , CIRCUMFERENTIAL, -6.12323e-16, 0., 8.8, -5.51091e-16, 0., 7.8
_core-sleeve_ssm_19, , CIRCUMFERENTIAL, -6.12323e-16, 0., 8.8, -5.51091e-16, 0., 7.8
_core-sleeve_ssm_20, , CIRCUMFERENTIAL, -6.12323e-16, 0., 8.8, -5.51091e-16, 0., 7.8
_core-sleeve_ssm_21, , CIRCUMFERENTIAL, -6.12323e-16, 0., 8.8, -5.51091e-16, 0., 7.8
_core-sleeve_ssm_22, , CIRCUMFERENTIAL, -6.12323e-16, 0., 8.8, -5.51091e-16, 0., 7.8
_core-sleeve_ssm_23, , CIRCUMFERENTIAL, -6.12323e-16, 0., 8.8, -5.51091e-16, 0., 7.8
_core-sleeve_ssm_24, , CIRCUMFERENTIAL, -6.12323e-16, 0., 8.8, -5.51091e-16, 0., 7.8
_core-sleeve_ssm_25, , CIRCUMFERENTIAL, -6.12323e-16, 0., 8.8, -5.51091e-16, 0., 7.8
_core-sleeve_ssm_26, , CIRCUMFERENTIAL, -6.12323e-16, 0., 8.8, -5.51091e-16, 0., 7.8
_core-sleeve_ssm_27, , CIRCUMFERENTIAL, -6.12323e-16, 0., 8.8, -5.51091e-16, 0., 7.8
_core-sleeve_ssm_28, , CIRCUMFERENTIAL, -6.12323e-16, 0., 8.8, -5.51091e-16, 0., 7.8
_core-sleeve_ssm_29, , CIRCUMFERENTIAL, -6.12323e-16, 0., 8.8, -5.51091e-16, 0., 7.8
_core-sleeve_ssm_30, , CIRCUMFERENTIAL, -6.12323e-16, 0., 8.8, -5.51091e-16, 0., 7.8
_core-sleeve_ssm_31, , CIRCUMFERENTIAL, -6.12323e-16, 0., 8.8, -5.51091e-16, 0., 7.8
_core-sleeve_ssm_32, , CIRCUMFERENTIAL, -6.12323e-16, 0., 8.8, -5.51091e-16, 0., 7.8
_core-sleeve_ssm_33, , CIRCUMFERENTIAL, -6.12323e-16, 0., 8.8, -5.51091e-16, 0., 7.8
_core-sleeve_ssm_34, , CIRCUMFERENTIAL, -6.12323e-16, 0., 8.8, -5.51091e-16, 0., 7.8
_core-sleeve_ssm_35, , CIRCUMFERENTIAL, -6.12323e-16, 0., 8.8, -5.51091e-16, 0., 7.8
*Surface Smoothing, name=exp-cyl
, _exp-cyl_msm_1, CIRCUMFERENTIAL, 0., 0., -64., 0., 0., -63.
, _exp-cyl_msm_2, CIRCUMFERENTIAL, 0., 0., -64., 0., 0., -63.
, _exp-cyl_msm_3, CIRCUMFERENTIAL, 0., 0., -64., 0., 0., -63.
, _exp-cyl_msm_4, CIRCUMFERENTIAL, 0., 0., -64., 0., 0., -63.
_exp-cyl_ssm_1, , CIRCUMFERENTIAL, -6.12323e-16, 0., 8.8, -5.51091e-16, 0., 7.8
_exp-cyl_ssm_2, , CIRCUMFERENTIAL, -6.12323e-16, 0., 8.8, -5.51091e-16, 0., 7.8
_exp-cyl_ssm_3, , CIRCUMFERENTIAL, -6.12323e-16, 0., 8.8, -5.51091e-16, 0., 7.8
_exp-cyl_ssm_4, , CIRCUMFERENTIAL, -6.12323e-16, 0., 8.8, -5.51091e-16, 0., 7.8
_exp-cyl_ssm_5, , CIRCUMFERENTIAL, -6.12323e-16, 0., 8.8, -5.51091e-16, 0., 7.8
_exp-cyl_ssm_6, , CIRCUMFERENTIAL, -6.12323e-16, 0., 8.8, -5.51091e-16, 0., 7.8
_exp-cyl_ssm_7, , CIRCUMFERENTIAL, -6.12323e-16, 0., 8.8, -5.51091e-16, 0., 7.8
_exp-cyl_ssm_8, , CIRCUMFERENTIAL, -6.12323e-16, 0., 8.8, -5.51091e-16, 0., 7.8
_exp-cyl_ssm_9, , CIRCUMFERENTIAL, -6.12323e-16, 0., 8.8, -5.51091e-16, 0., 7.8
_exp-cyl_ssm_10, , CIRCUMFERENTIAL, -6.12323e-16, 0., 8.8, -5.51091e-16, 0., 7.8
_exp-cyl_ssm_11, , CIRCUMFERENTIAL, -6.12323e-16, 0., 8.8, -5.51091e-16, 0., 7.8
_exp-cyl_ssm_12, , CIRCUMFERENTIAL, -6.12323e-16, 0., 8.8, -5.51091e-16, 0., 7.8
_exp-cyl_ssm_13, , CIRCUMFERENTIAL, -6.12323e-16, 0., 8.8, -5.51091e-16, 0., 7.8
_exp-cyl_ssm_14, , CIRCUMFERENTIAL, -6.12323e-16, 0., 8.8, -5.51091e-16, 0., 7.8
_exp-cyl_ssm_15, , CIRCUMFERENTIAL, -6.12323e-16, 0., 8.8, -5.51091e-16, 0., 7.8
_exp-cyl_ssm_16, , CIRCUMFERENTIAL, -6.12323e-16, 0., 8.8, -5.51091e-16, 0., 7.8
_exp-cyl_ssm_17, , CIRCUMFERENTIAL, -6.12323e-16, 0., 8.8, -5.51091e-16, 0., 7.8
_exp-cyl_ssm_18, , CIRCUMFERENTIAL, -6.12323e-16, 0., 8.8, -5.51091e-16, 0., 7.8
_exp-cyl_ssm_19, , CIRCUMFERENTIAL, -6.12323e-16, 0., 8.8, -5.51091e-16, 0., 7.8
_exp-cyl_ssm_20, , CIRCUMFERENTIAL, -6.12323e-16, 0., 8.8, -5.51091e-16, 0., 7.8
_exp-cyl_ssm_21, , CIRCUMFERENTIAL, -6.12323e-16, 0., 8.8, -5.51091e-16, 0., 7.8
_exp-cyl_ssm_22, , CIRCUMFERENTIAL, -6.12323e-16, 0., 8.8, -5.51091e-16, 0., 7.8
_exp-cyl_ssm_23, , CIRCUMFERENTIAL, -6.12323e-16, 0., 8.8, -5.51091e-16, 0., 7.8
_exp-cyl_ssm_24, , CIRCUMFERENTIAL, -6.12323e-16, 0., 8.8, -5.51091e-16, 0., 7.8
_exp-cyl_ssm_25, , CIRCUMFERENTIAL, -6.12323e-16, 0., 8.8, -5.51091e-16, 0., 7.8
_exp-cyl_ssm_26, , CIRCUMFERENTIAL, -6.12323e-16, 0., 8.8, -5.51091e-16, 0., 7.8
_exp-cyl_ssm_27, , CIRCUMFERENTIAL, -6.12323e-16, 0., 8.8, -5.51091e-16, 0., 7.8
_exp-cyl_ssm_28, , CIRCUMFERENTIAL, -6.12323e-16, 0., 8.8, -5.51091e-16, 0., 7.8
_exp-cyl_ssm_29, , CIRCUMFERENTIAL, -6.12323e-16, 0., 8.8, -5.51091e-16, 0., 7.8
_exp-cyl_ssm_30, , CIRCUMFERENTIAL, -6.12323e-16, 0., 8.8, -5.51091e-16, 0., 7.8
_exp-cyl_ssm_31, , CIRCUMFERENTIAL, -6.12323e-16, 0., 8.8, -5.51091e-16, 0., 7.8
_exp-cyl_ssm_32, , CIRCUMFERENTIAL, -6.12323e-16, 0., 8.8, -5.51091e-16, 0., 7.8
_exp-cyl_ssm_33, , CIRCUMFERENTIAL, -6.12323e-16, 0., 8.8, -5.51091e-16, 0., 7.8
_exp-cyl_ssm_34, , CIRCUMFERENTIAL, -6.12323e-16, 0., 8.8, -5.51091e-16, 0., 7.8
*Surface Smoothing, name=large-dia-sleeve
, _large-dia-sleeve_msm_1, CIRCUMFERENTIAL, 5., 0., -95., 5., 0., -94.
, _large-dia-sleeve_msm_2, CIRCUMFERENTIAL, 5., 0., -95., 5., 0., -94.
_large-dia-sleeve_ssm_1, , CIRCUMFERENTIAL, -6.12323e-16, 0., 8.8, -5.51091e-16, 0., 7.8
_large-dia-sleeve_ssm_2, , CIRCUMFERENTIAL, -6.12323e-16, 0., 8.8, -5.51091e-16, 0., 7.8
_large-dia-sleeve_ssm_3, , CIRCUMFERENTIAL, -6.12323e-16, 0., 8.8, -5.51091e-16, 0., 7.8
_large-dia-sleeve_ssm_4, , CIRCUMFERENTIAL, -6.12323e-16, 0., 8.8, -5.51091e-16, 0., 7.8
_large-dia-sleeve_ssm_5, , CIRCUMFERENTIAL, -6.12323e-16, 0., 8.8, -5.51091e-16, 0., 7.8
_large-dia-sleeve_ssm_6, , CIRCUMFERENTIAL, -6.12323e-16, 0., 8.8, -5.51091e-16, 0., 7.8
_large-dia-sleeve_ssm_7, , CIRCUMFERENTIAL, -6.12323e-16, 0., 8.8, -5.51091e-16, 0., 7.8
_large-dia-sleeve_ssm_8, , CIRCUMFERENTIAL, -6.12323e-16, 0., 8.8, -5.51091e-16, 0., 7.8
_large-dia-sleeve_ssm_9, , CIRCUMFERENTIAL, -6.12323e-16, 0., 8.8, -5.51091e-16, 0., 7.8
_large-dia-sleeve_ssm_10, , CIRCUMFERENTIAL, -6.12323e-16, 0., 8.8, -5.51091e-16, 0., 7.8
_large-dia-sleeve_ssm_11, , CIRCUMFERENTIAL, -6.12323e-16, 0., 8.8, -5.51091e-16, 0., 7.8
_large-dia-sleeve_ssm_12, , CIRCUMFERENTIAL, -6.12323e-16, 0., 8.8, -5.51091e-16, 0., 7.8
_large-dia-sleeve_ssm_13, , CIRCUMFERENTIAL, -6.12323e-16, 0., 8.8, -5.51091e-16, 0., 7.8
_large-dia-sleeve_ssm_14, , CIRCUMFERENTIAL, -6.12323e-16, 0., 8.8, -5.51091e-16, 0., 7.8
_large-dia-sleeve_ssm_15, , CIRCUMFERENTIAL, -6.12323e-16, 0., 8.8, -5.51091e-16, 0., 7.8
_large-dia-sleeve_ssm_16, , CIRCUMFERENTIAL, -6.12323e-16, 0., 8.8, -5.51091e-16, 0., 7.8
_large-dia-sleeve_ssm_17, , CIRCUMFERENTIAL, -6.12323e-16, 0., 8.8, -5.51091e-16, 0., 7.8
_large-dia-sleeve_ssm_18, , CIRCUMFERENTIAL, -6.12323e-16, 0., 8.8, -5.51091e-16, 0., 7.8
_large-dia-sleeve_ssm_19, , CIRCUMFERENTIAL, -6.12323e-16, 0., 8.8, -5.51091e-16, 0., 7.8
_large-dia-sleeve_ssm_20, , CIRCUMFERENTIAL, -6.12323e-16, 0., 8.8, -5.51091e-16, 0., 7.8
_large-dia-sleeve_ssm_21, , CIRCUMFERENTIAL, -6.12323e-16, 0., 8.8, -5.51091e-16, 0., 7.8
_large-dia-sleeve_ssm_22, , CIRCUMFERENTIAL, -6.12323e-16, 0., 8.8, -5.51091e-16, 0., 7.8
_large-dia-sleeve_ssm_23, , CIRCUMFERENTIAL, -6.12323e-16, 0., 8.8, -5.51091e-16, 0., 7.8
_large-dia-sleeve_ssm_24, , CIRCUMFERENTIAL, -6.12323e-16, 0., 8.8, -5.51091e-16, 0., 7.8
_large-dia-sleeve_ssm_25, , CIRCUMFERENTIAL, -6.12323e-16, 0., 8.8, -5.51091e-16, 0., 7.8
_large-dia-sleeve_ssm_26, , CIRCUMFERENTIAL, -6.12323e-16, 0., 8.8, -5.51091e-16, 0., 7.8
_large-dia-sleeve_ssm_27, , CIRCUMFERENTIAL, -6.12323e-16, 0., 8.8, -5.51091e-16, 0., 7.8
_large-dia-sleeve_ssm_28, , CIRCUMFERENTIAL, -6.12323e-16, 0., 8.8, -5.51091e-16, 0., 7.8
_large-dia-sleeve_ssm_29, , CIRCUMFERENTIAL, -6.12323e-16, 0., 8.8, -5.51091e-16, 0., 7.8
_large-dia-sleeve_ssm_30, , CIRCUMFERENTIAL, -6.12323e-16, 0., 8.8, -5.51091e-16, 0., 7.8
_large-dia-sleeve_ssm_31, , CIRCUMFERENTIAL, -6.12323e-16, 0., 8.8, -5.51091e-16, 0., 7.8
_large-dia-sleeve_ssm_32, , CIRCUMFERENTIAL, -6.12323e-16, 0., 8.8, -5.51091e-16, 0., 7.8
_large-dia-sleeve_ssm_33, , CIRCUMFERENTIAL, -6.12323e-16, 0., 8.8, -5.51091e-16, 0., 7.8
_large-dia-sleeve_ssm_34, , CIRCUMFERENTIAL, -6.12323e-16, 0., 8.8, -5.51091e-16, 0., 7.8
_large-dia-sleeve_ssm_35, , CIRCUMFERENTIAL, -6.12323e-16, 0., 8.8, -5.51091e-16, 0., 7.8
*Surface Smoothing, name=slide-core
_slide-core_ssm_1, , CIRCUMFERENTIAL, -6.12323e-16, 0., 8.8, -5.51091e-16, 0., 7.8
_slide-core_ssm_2, , CIRCUMFERENTIAL, -6.12323e-16, 0., 8.8, -5.51091e-16, 0., 7.8
_slide-core_ssm_3, , CIRCUMFERENTIAL, -6.12323e-16, 0., 8.8, -5.51091e-16, 0., 7.8
_slide-core_ssm_4, , CIRCUMFERENTIAL, -6.12323e-16, 0., 8.8, -5.51091e-16, 0., 7.8
_slide-core_ssm_5, , CIRCUMFERENTIAL, -6.12323e-16, 0., 8.8, -5.51091e-16, 0., 7.8
_slide-core_ssm_6, , CIRCUMFERENTIAL, -6.12323e-16, 0., 8.8, -5.51091e-16, 0., 7.8
_slide-core_ssm_7, , CIRCUMFERENTIAL, -6.12323e-16, 0., 8.8, -5.51091e-16, 0., 7.8
_slide-core_ssm_8, , CIRCUMFERENTIAL, -6.12323e-16, 0., 8.8, -5.51091e-16, 0., 7.8
_slide-core_ssm_9, , CIRCUMFERENTIAL, -6.12323e-16, 0., 8.8, -5.51091e-16, 0., 7.8
_slide-core_ssm_10, , CIRCUMFERENTIAL, -6.12323e-16, 0., 8.8, -5.51091e-16, 0., 7.8
_slide-core_ssm_11, , CIRCUMFERENTIAL, -6.12323e-16, 0., 8.8, -5.51091e-16, 0., 7.8
_slide-core_ssm_12, , CIRCUMFERENTIAL, -6.12323e-16, 0., 8.8, -5.51091e-16, 0., 7.8
_slide-core_ssm_13, , CIRCUMFERENTIAL, -6.12323e-16, 0., 8.8, -5.51091e-16, 0., 7.8
_slide-core_ssm_14, , CIRCUMFERENTIAL, -6.12323e-16, 0., 8.8, -5.51091e-16, 0., 7.8
_slide-core_ssm_15, , CIRCUMFERENTIAL, -6.12323e-16, 0., 8.8, -5.51091e-16, 0., 7.8
_slide-core_ssm_16, , CIRCUMFERENTIAL, -6.12323e-16, 0., 8.8, -5.51091e-16, 0., 7.8
_slide-core_ssm_17, , CIRCUMFERENTIAL, -6.12323e-16, 0., 8.8, -5.51091e-16, 0., 7.8
_slide-core_ssm_18, , CIRCUMFERENTIAL, -6.12323e-16, 0., 8.8, -5.51091e-16, 0., 7.8
_slide-core_ssm_19, , CIRCUMFERENTIAL, -6.12323e-16, 0., 8.8, -5.51091e-16, 0., 7.8
_slide-core_ssm_20, , CIRCUMFERENTIAL, -6.12323e-16, 0., 8.8, -5.51091e-16, 0., 7.8
_slide-core_ssm_21, , CIRCUMFERENTIAL, -6.12323e-16, 0., 8.8, -5.51091e-16, 0., 7.8
_slide-core_ssm_22, , CIRCUMFERENTIAL, -6.12323e-16, 0., 8.8, -5.51091e-16, 0., 7.8
_slide-core_ssm_23, , CIRCUMFERENTIAL, -6.12323e-16, 0., 8.8, -5.51091e-16, 0., 7.8
_slide-core_ssm_24, , CIRCUMFERENTIAL, -6.12323e-16, 0., 8.8, -5.51091e-16, 0., 7.8
_slide-core_ssm_25, , CIRCUMFERENTIAL, -6.12323e-16, 0., 8.8, -5.51091e-16, 0., 7.8
_slide-core_ssm_26, , CIRCUMFERENTIAL, -6.12323e-16, 0., 8.8, -5.51091e-16, 0., 7.8
_slide-core_ssm_27, , CIRCUMFERENTIAL, -6.12323e-16, 0., 8.8, -5.51091e-16, 0., 7.8
_slide-core_ssm_28, , CIRCUMFERENTIAL, -6.12323e-16, 0., 8.8, -5.51091e-16, 0., 7.8
_slide-core_ssm_29, , CIRCUMFERENTIAL, -6.12323e-16, 0., 8.8, -5.51091e-16, 0., 7.8
_slide-core_ssm_30, , CIRCUMFERENTIAL, -6.12323e-16, 0., 8.8, -5.51091e-16, 0., 7.8
_slide-core_ssm_31, , CIRCUMFERENTIAL, -6.12323e-16, 0., 8.8, -5.51091e-16, 0., 7.8
_slide-core_ssm_32, , CIRCUMFERENTIAL, -6.12323e-16, 0., 8.8, -5.51091e-16, 0., 7.8
_slide-core_ssm_33, , CIRCUMFERENTIAL, -6.12323e-16, 0., 8.8, -5.51091e-16, 0., 7.8
_slide-core_ssm_34, , CIRCUMFERENTIAL, -6.12323e-16, 0., 8.8, -5.51091e-16, 0., 7.8
**
** BOUNDARY CONDITIONS
**
** Name: exp-cyl Type: Displacement/Rotation
*Boundary
exp-cyl-1.EALL, 1, 1
exp-cyl-1.EALL, 2, 2
exp-cyl-1.EALL, 3, 3
** Name: fix-theta Type: Displacement/Rotation
*Boundary
fix-theta, 2, 2
** Name: fix-z Type: Displacement/Rotation
*Boundary
fix-z, 3, 3
**
** PREDEFINED FIELDS
**
** Name: Predefined Field-1   Type: Temperature
*Initial Conditions, type=TEMPERATURE
Concept-D101-as-cut.EALL, 22.
**
** INTERACTIONS
**
** Interaction: core-sleeve
*Contact Pair, interaction=AL, type=SURFACE TO SURFACE, geometric correction=core-sleeve
OD, mandrel-core-sleeve-1.ID
** Interaction: exp-cyl
*Contact Pair, interaction=AL, type=SURFACE TO SURFACE, geometric correction=exp-cyl
ID, exp-cyl-1.OD
** Interaction: large-dia-sleeve
*Contact Pair, interaction=AL, type=SURFACE TO SURFACE, geometric correction=large-dia-sleeve
OD, large-dia-sleeve-1.ID
** Interaction: slide-core
*Contact Pair, interaction=AL, type=SURFACE TO SURFACE, geometric correction=slide-core
ID, mandrel-core-1.OD
** ----------------------------------------------------------------
**
** STEP: expand-14mm
**
*Step, name=expand-14mm, nlgeom=YES, inc=10000, unsymm=YES
*Static
0.01, 1., 1e-05, 1.
**
** BOUNDARY CONDITIONS
**
** Name: exp-cyl Type: Displacement/Rotation
*Boundary
exp-cyl-1.EALL, 1, 1, 3.6
**
** INTERACTIONS
**
** Interaction: core-sleeve
*Model Change, type=CONTACT PAIR, remove
OD, mandrel-core-sleeve-1.ID
** Interaction: large-dia-sleeve
*Model Change, type=CONTACT PAIR, remove
OD, large-dia-sleeve-1.ID
** Interaction: slide-core
*Model Change, type=CONTACT PAIR, remove
ID, mandrel-core-1.OD
**
** OUTPUT REQUESTS
**
*Restart, write, number interval=1, time marks=NO
**
** FIELD OUTPUT: F-Output-1
**
*Output, field, number interval=5
*Node Output
U,
*Element Output, directions=YES
LE, S, SDV
**
** HISTORY OUTPUT: H-Output-1
**
*Output, history, variable=PRESELECT
*End Step
** ----------------------------------------------------------------
**
** STEP: anneal-1
**
*Step, name=anneal-1, nlgeom=YES
*Static
1., 1., 1e-05, 1.
**
** INTERACTIONS
**
** Interaction: anneal
*Model Change, remove
Concept-D101-as-cut.EALL,
** Interaction: exp-cyl
*Model Change, type=CONTACT PAIR, remove
ID, exp-cyl-1.OD
**
** OUTPUT REQUESTS
**
*Restart, write, number interval=1, time marks=NO
**
** FIELD OUTPUT: F-Output-1
**
*Output, field, number interval=1
*Node Output
U,
*Element Output, directions=YES
LE, S, SDV
**
** HISTORY OUTPUT: H-Output-1
**
*Output, history, variable=PRESELECT
*End Step
** ----------------------------------------------------------------
**
** STEP: expand-21mm
**
*Step, name=expand-21mm, nlgeom=YES, unsymm=YES
*Static
0.01, 1., 1e-05, 1.
**
** BOUNDARY CONDITIONS
**
** Name: exp-cyl Type: Displacement/Rotation
*Boundary
exp-cyl-1.EALL, 1, 1, 7.1
**
** INTERACTIONS
**
** Interaction: anneal
*Model Change, add
Concept-D101-as-cut.EALL,
** Interaction: exp-cyl
*Model Change, type=CONTACT PAIR, add
ID, exp-cyl-1.OD
**
** OUTPUT REQUESTS
**
*Restart, write, number interval=1, time marks=NO
**
** FIELD OUTPUT: F-Output-1
**
*Output, field, number interval=5
*Node Output
U,
*Element Output, directions=YES
LE, S, SDV
**
** HISTORY OUTPUT: H-Output-1
**
*Output, history, variable=PRESELECT
*End Step
** ----------------------------------------------------------------
**
** STEP: anneal-2
**
*Step, name=anneal-2, nlgeom=YES
*Static
1., 1., 1e-05, 1.
**
** INTERACTIONS
**
** Interaction: anneal
*Model Change, remove
Concept-D101-as-cut.EALL,
** Interaction: exp-cyl
*Model Change, type=CONTACT PAIR, remove
ID, exp-cyl-1.OD
**
** OUTPUT REQUESTS
**
*Restart, write, number interval=1, time marks=NO
**
** FIELD OUTPUT: F-Output-1
**
*Output, field, number interval=1
*Node Output
U,
*Element Output, directions=YES
LE, S, SDV
**
** HISTORY OUTPUT: H-Output-1
**
*Output, history, variable=PRESELECT
*End Step
** ----------------------------------------------------------------
**
** STEP: expand-28mm
**
*Step, name=expand-28mm, nlgeom=YES, inc=10000, unsymm=YES
*Static
0.01, 1., 1e-05, 1.
**
** BOUNDARY CONDITIONS
**
** Name: exp-cyl Type: Displacement/Rotation
*Boundary
exp-cyl-1.EALL, 1, 1, 10.6
**
** INTERACTIONS
**
** Interaction: anneal
*Model Change, add
Concept-D101-as-cut.EALL,
** Interaction: exp-cyl
*Model Change, type=CONTACT PAIR, add
ID, exp-cyl-1.OD
**
** OUTPUT REQUESTS
**
*Restart, write, number interval=1, time marks=NO
**
** FIELD OUTPUT: F-Output-1
**
*Output, field, number interval=5
*Node Output
U,
*Element Output, directions=YES
LE, S, SDV
**
** HISTORY OUTPUT: H-Output-1
**
*Output, history, variable=PRESELECT
*End Step
** ----------------------------------------------------------------
**
** STEP: anneal-3
**
*Step, name=anneal-3, nlgeom=YES
*Static
1., 1., 1e-05, 1.
**
** INTERACTIONS
**
** Interaction: anneal
*Model Change, remove
Concept-D101-as-cut.EALL,
** Interaction: exp-cyl
*Model Change, type=CONTACT PAIR, remove
ID, exp-cyl-1.OD
**
** OUTPUT REQUESTS
**
*Restart, write, number interval=1, time marks=NO
**
** FIELD OUTPUT: F-Output-1
**
*Output, field, number interval=1
*Node Output
U,
*Element Output, directions=YES
LE, S, SDV
**
** HISTORY OUTPUT: H-Output-1
**
*Output, history, variable=PRESELECT
*End Step
** ----------------------------------------------------------------
**
** STEP: slide-core
**
*Step, name=slide-core, nlgeom=YES, inc=10000, unsymm=YES
*Static
0.01, 1., 1e-05, 1.
**
** BOUNDARY CONDITIONS
**
** Name: fix-r Type: Displacement/Rotation
*Boundary, fixed
fix-r, 1, 1
** Name: slide-core Type: Displacement/Rotation
*Boundary
mandrel-core-1.Ref, 1, 1
mandrel-core-1.Ref, 2, 2
mandrel-core-1.Ref, 3, 3, 35.
mandrel-core-1.Ref, 4, 4
mandrel-core-1.Ref, 5, 5
mandrel-core-1.Ref, 6, 6
** Name: slide-large-cyl Type: Displacement/Rotation
*Boundary
large-dia-sleeve-1.EALL, 1, 1
large-dia-sleeve-1.EALL, 2, 2
large-dia-sleeve-1.EALL, 3, 3, 35.
** Name: slide-sleeve Type: Displacement/Rotation
*Boundary
mandrel-core-sleeve-1.Ref, 1, 1
mandrel-core-sleeve-1.Ref, 2, 2
mandrel-core-sleeve-1.Ref, 3, 3, 35.
mandrel-core-sleeve-1.Ref, 4, 4
mandrel-core-sleeve-1.Ref, 5, 5
mandrel-core-sleeve-1.Ref, 6, 6
**
** INTERACTIONS
**
** Interaction: anneal
*Model Change, add
Concept-D101-as-cut.EALL,
** Interaction: exp-cyl
*Model Change, type=CONTACT PAIR, add
ID, exp-cyl-1.OD
** Interaction: slide-core
*Model Change, type=CONTACT PAIR, add
ID, mandrel-core-1.OD
**
** OUTPUT REQUESTS
**
*Restart, write, number interval=1, time marks=NO
**
** FIELD OUTPUT: F-Output-1
**
*Output, field, number interval=5
*Node Output
U,
*Element Output, directions=YES
LE, S, SDV
**
** HISTORY OUTPUT: H-Output-1
**
*Output, history, variable=PRESELECT
*End Step
** ----------------------------------------------------------------
**
** STEP: anneal-4
**
*Step, name=anneal-4, nlgeom=YES
*Static
1., 1., 1e-05, 1.
**
** INTERACTIONS
**
** Interaction: anneal
*Model Change, remove
Concept-D101-as-cut.EALL,
** Interaction: exp-cyl
*Model Change, type=CONTACT PAIR, remove
ID, exp-cyl-1.OD
** Interaction: slide-core
*Model Change, type=CONTACT PAIR, remove
ID, mandrel-core-1.OD
**
** OUTPUT REQUESTS
**
*Restart, write, number interval=1, time marks=NO
**
** FIELD OUTPUT: F-Output-1
**
*Output, field, number interval=1
*Node Output
U,
*Element Output, directions=YES
LE, S, SDV
**
** HISTORY OUTPUT: H-Output-1
**
*Output, history, variable=PRESELECT
*End Step
** ----------------------------------------------------------------
**
** STEP: constrain-sleeve
**
*Step, name=constrain-sleeve, nlgeom=YES, inc=10000, unsymm=YES
*Static
0.01, 1., 1e-05, 1.
**
** BOUNDARY CONDITIONS
**
** Name: slide-large-cyl Type: Displacement/Rotation
*Boundary
large-dia-sleeve-1.EALL, 1, 1, -5.45
** Name: slide-sleeve Type: Displacement/Rotation
*Boundary
mandrel-core-sleeve-1.Ref, 1, 1, -5.45
**
** INTERACTIONS
**
** Interaction: anneal
*Model Change, add
Concept-D101-as-cut.EALL,
** Interaction: core-sleeve
*Model Change, type=CONTACT PAIR, add
OD, mandrel-core-sleeve-1.ID
** Interaction: exp-cyl
*Model Change, type=CONTACT PAIR, add
ID, exp-cyl-1.OD
** Interaction: large-dia-sleeve
*Model Change, type=CONTACT PAIR, add
OD, large-dia-sleeve-1.ID
** Interaction: slide-core
*Model Change, type=CONTACT PAIR, add
ID, mandrel-core-1.OD
**
** OUTPUT REQUESTS
**
*Restart, write, number interval=1, time marks=NO
**
** FIELD OUTPUT: F-Output-1
**
*Output, field, number interval=5
*Node Output
U,
*Element Output, directions=YES
LE, S, SDV
**
** HISTORY OUTPUT: H-Output-1
**
*Output, history, variable=PRESELECT
*End Step
