** Copyright 2017 Confluent Medical Technologies
** Released as part of nitinol-design-concepts
** https://github.com/confluentmedical/nitinol-design-concepts
** under terms of Apache 2.0 license
** http://www.apache.org/licenses/LICENSE-2.0.txt
**
*Heading
** Job name: open-frame-fatigue-v25mm-9pct Model name: open-frame-fatigue-v25mm-9pct
** Generated by: Abaqus/CAE 2017
*Preprint, echo=NO, model=NO, history=NO, contact=NO
**
** PARTS
**
*Part, name=CONCEPT-D101-AS-CUT
*Node
      1,   13.8693495,   2.53915429,  -5.42915821
      2,   13.9836102,   2.54830885,  -5.43056679
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*Element, type=C3D8R
   1,   473,   397,   691,   157,   569,   611,   586,   522
   2,   397,   398,   692,   691,   611,   612,   605,   586
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*Elset, elset=EALL, generate
    1,  9928,     1
*Nset, nset=NALL, generate
     1,  15580,      1
*Elset, elset=_OD_S1, internal
 3681, 3682, 3683, 3684, 3685, 3686
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*Elset, elset=_OD_S2, internal
  732,  733,  734,  735,  736,  737
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*Elset, elset=_OD_S4, internal
    4,    8,   12,   16,   20,   24
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*Elset, elset=_OD_S6, internal
  757,  761,  765,  769,  773,  777
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*Surface, type=ELEMENT, name=OD
_OD_S1, S1
_OD_S2, S2
_OD_S4, S4
_OD_S6, S6
*Elset, elset=_ID_S1, internal
  657,  658,  659,  660,  661,  662
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*Elset, elset=_ID_S2, internal
 3756, 3757, 3758, 3759, 3760, 3761
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*Elset, elset=_ID_S4, internal
  760,  764,  768,  772,  776,  780
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*Elset, elset=_ID_S6, internal
    1,    5,    9,   13,   17,   21
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*Surface, type=ELEMENT, name=ID
_ID_S1, S1
_ID_S2, S2
_ID_S4, S4
_ID_S6, S6
** Section: Section-1
*Solid Section, elset=EALL, controls=EC-1, material=ABQ_SUPER_ELASTIC_PLASTIC_Af19
,
*End Part
**
*Part, name=chamber
*Node
      1,   19.4061012,      -3.4375,   1.91133428
      2,   19.4061012,     -33.4375,   1.91133428
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*Element, type=SFM3D4R
1,  1,  2, 13, 18
2, 18, 13, 14, 17
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*Nset, nset=EALL, generate
  1,  36,   1
*Elset, elset=EALL, generate
  1,  24,   1
*Elset, elset=_ID_SPOS, internal, generate
  1,  24,   1
*Surface, type=ELEMENT, name=ID
_ID_SPOS, SPOS
** Section: Section-2
*Surface Section, elset=EALL
*End Part
**
*Part, name=crimp-cyl-full
*Node
      1,         -21.,           0.,          75.
      2,         -21.,           0.,           0.
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*Element, type=SFM3D4R
 1,  1,  2,  5, 54
 2, 54,  5,  6, 53
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*Nset, nset=EALL, generate
   1,  104,    1
*Elset, elset=EALL, generate
  1,  52,   1
*Elset, elset=_ID_SNEG, internal, generate
  1,  52,   1
*Surface, type=ELEMENT, name=ID
_ID_SNEG, SNEG
** Section: Section-2
*Surface Section, elset=EALL
*End Part
**
*Part, name=inside-cyl
*Node
      1,        -4.25,           0.,          75.
      2,        -4.25,           0.,           0.
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*Element, type=SFM3D4R
 1,  1,  2,  5, 54
 2, 54,  5,  6, 53
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*Nset, nset=EALL, generate
   1,  104,    1
*Elset, elset=EALL, generate
  1,  52,   1
*Elset, elset=_OD_SPOS, internal, generate
  1,  52,   1
*Surface, type=ELEMENT, name=OD
_OD_SPOS, SPOS
** Section: Section-2
*Surface Section, elset=EALL
*End Part
**
**
** ASSEMBLY
**
*Assembly, name=Assembly
**
*Instance, name=D101-ascut-frame-1, part=CONCEPT-D101-AS-CUT
*End Instance
**
*Instance, name=crimp-cyl-1, part=crimp-cyl-full
          0.,           0.,         -75.
*End Instance
**
*Instance, name=inside-cyl-1, part=inside-cyl
          0.,           0.,         -75.
*End Instance
**
*Instance, name=chamber-1, part=chamber
          0.,           0.,     -35.5625
          0.,           0.,     -35.5625, 0.990438362521764, 0.0975496689047288, -35.4649503310953, 90.5504689510115
*End Instance
**
*Nset, nset=fix-theta, instance=D101-ascut-frame-1
  1057,  1058,  1061,  1067,  1068,  1072
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*Nset, nset=fix-z, instance=D101-ascut-frame-1
 14977,
*Nset, nset=_T-cyl, internal
chamber-1.EALL,
crimp-cyl-1.EALL,
fix-theta,
fix-z,
*Transform, nset=_T-cyl, type=C
          0.,           0.,           0.,           0.,           0.,           1.
*End Assembly
**
** ELEMENT CONTROLS
**
*Section Controls, name=EC-1, hourglass=ENHANCED
1., 1., 1.
**
** MATERIALS
**
*Material, name=ABQ_SUPER_ELASTIC_PLASTIC_Af19
*Depvar
     31,
*User Material, constants=32, unsymm
62857.,  0.33,27778.,  0.33, 0.046,  6.52,  460.,  500.
   37.,  6.52,  240.,  210.,  690.,    0.,    0.,    8.
 1170., 0.087, 1240., 0.091, 1320., 0.095, 1370., 0.099
 1440., 0.106, 1460., 0.112, 1500.,  0.12, 1510., 0.128
**
** INTERACTION PROPERTIES
**
*Surface Interaction, name=AL
1.,
*Surface Behavior, augmented Lagrange
, , 1e-05
**
** BOUNDARY CONDITIONS
**
** Name: chamber Type: Displacement/Rotation
*Boundary
chamber-1.EALL, 1, 1
chamber-1.EALL, 2, 2
chamber-1.EALL, 3, 3
** Name: crimp-cyl-large Type: Displacement/Rotation
*Boundary
crimp-cyl-1.EALL, 1, 1
crimp-cyl-1.EALL, 2, 2
crimp-cyl-1.EALL, 3, 3
** Name: fix-theta Type: Displacement/Rotation
*Boundary
fix-theta, 2, 2
** Name: fix-z Type: Displacement/Rotation
*Boundary
fix-z, 3, 3
** Name: inside-cyl Type: Displacement/Rotation
*Boundary
inside-cyl-1.EALL, 1, 1
inside-cyl-1.EALL, 2, 2
inside-cyl-1.EALL, 3, 3
**
** PREDEFINED FIELDS
**
** Name: temp   Type: Temperature
*Initial Conditions, type=TEMPERATURE
D101-ascut-frame-1.NALL, 37.
**
** INTERACTIONS
**
** Interaction: stent-chamber
*Contact Pair, interaction=AL, smooth=0.499
D101-ascut-frame-1.OD, chamber-1.ID
** Interaction: stent-cylinder-large
*Contact Pair, interaction=AL, smooth=0.499
D101-ascut-frame-1.OD, crimp-cyl-1.ID
** Interaction: stent-insde-cyl
*Contact Pair, interaction=AL, smooth=0.499
D101-ascut-frame-1.ID, inside-cyl-1.OD
** ----------------------------------------------------------------
**
** STEP: crimp-10mm
**
*Step, name=crimp-10mm, nlgeom=YES, inc=10000, unsymm=YES
*Static
0.01, 1., 1e-05, 0.05
**
** BOUNDARY CONDITIONS
**
** Name: crimp-cyl-large Type: Displacement/Rotation
*Boundary
crimp-cyl-1.EALL, 1, 1, -16.
**
** INTERACTIONS
**
** Interaction: stent-chamber
*Model Change, type=CONTACT PAIR, remove
D101-ascut-frame-1.OD, chamber-1.ID
**
** OUTPUT REQUESTS
**
*Restart, write, number interval=1, time marks=NO
**
** FIELD OUTPUT: F-Output-1
**
*Output, field, number interval=5
*Node Output
U,
*Element Output, directions=YES
IVOL, LE, S, SDV
**
** HISTORY OUTPUT: H-Output-1
**
*Output, history, variable=PRESELECT
*End Step
** ----------------------------------------------------------------
**
** STEP: deploy-annulus-25mm
**
*Step, name=deploy-annulus-25mm, nlgeom=YES, inc=10000, unsymm=YES
*Static
0.01, 1., 1e-05, 0.05
**
** BOUNDARY CONDITIONS
**
** Name: crimp-cyl-large Type: Displacement/Rotation
*Boundary
crimp-cyl-1.EALL, 1, 1
**
** INTERACTIONS
**
** Interaction: stent-chamber
*Model Change, type=CONTACT PAIR, add
D101-ascut-frame-1.OD, chamber-1.ID
**
** OUTPUT REQUESTS
**
*Restart, write, number interval=1, time marks=NO
**
** FIELD OUTPUT: F-Output-1
**
*Output, field, number interval=5
*Node Output
U,
*Element Output, directions=YES
IVOL, LE, S, SDV
**
** HISTORY OUTPUT: H-Output-1
**
*Output, history, variable=PRESELECT
*End Step
** ----------------------------------------------------------------
**
** STEP: systole-01
**
*Step, name=systole-01, nlgeom=YES, inc=10000, unsymm=YES
*Static
0.01, 1., 1e-05, 0.05
**
** BOUNDARY CONDITIONS
**
** Name: chamber Type: Displacement/Rotation
*Boundary
chamber-1.EALL, 1, 1, -1.125
**
** OUTPUT REQUESTS
**
*Restart, write, number interval=1, time marks=NO
**
** FIELD OUTPUT: F-Output-1
**
*Output, field, number interval=1
*Node Output
U,
*Element Output, directions=YES
IVOL, LE, S, SDV
**
** HISTORY OUTPUT: H-Output-1
**
*Output, history, variable=PRESELECT
*End Step
** ----------------------------------------------------------------
**
** STEP: diastole-01
**
*Step, name=diastole-01, nlgeom=YES, inc=10000, unsymm=YES
*Static
0.01, 1., 1e-05, 0.05
**
** BOUNDARY CONDITIONS
**
** Name: chamber Type: Displacement/Rotation
*Boundary
chamber-1.EALL, 1, 1
**
** OUTPUT REQUESTS
**
*Restart, write, number interval=1, time marks=NO
**
** FIELD OUTPUT: F-Output-1
**
*Output, field, number interval=1
*Node Output
U,
*Element Output, directions=YES
IVOL, LE, S, SDV
**
** HISTORY OUTPUT: H-Output-1
**
*Output, history, variable=PRESELECT
*End Step
** ----------------------------------------------------------------
**
** STEP: systole-02
**
*Step, name=systole-02, nlgeom=YES, inc=10000, unsymm=YES
*Static
0.01, 1., 1e-05, 0.05
**
** BOUNDARY CONDITIONS
**
** Name: chamber Type: Displacement/Rotation
*Boundary
chamber-1.EALL, 1, 1, -1.125
**
** OUTPUT REQUESTS
**
*Restart, write, number interval=1, time marks=NO
**
** FIELD OUTPUT: F-Output-1
**
*Output, field, number interval=1
*Node Output
U,
*Element Output, directions=YES
IVOL, LE, S, SDV
**
** HISTORY OUTPUT: H-Output-1
**
*Output, history, variable=PRESELECT
*End Step
** ----------------------------------------------------------------
**
** STEP: diastole-02
**
*Step, name=diastole-02, nlgeom=YES, inc=10000, unsymm=YES
*Static
0.01, 1., 1e-05, 0.05
**
** BOUNDARY CONDITIONS
**
** Name: chamber Type: Displacement/Rotation
*Boundary
chamber-1.EALL, 1, 1
**
** OUTPUT REQUESTS
**
*Restart, write, number interval=1, time marks=NO
**
** FIELD OUTPUT: F-Output-1
**
*Output, field, number interval=1
*Node Output
U,
*Element Output, directions=YES
IVOL, LE, S, SDV
**
** HISTORY OUTPUT: H-Output-1
**
*Output, history, variable=PRESELECT
*End Step
** ----------------------------------------------------------------
**
** STEP: systole-03
**
*Step, name=systole-03, nlgeom=YES, inc=10000, unsymm=YES
*Static
0.01, 1., 1e-05, 0.05
**
** BOUNDARY CONDITIONS
**
** Name: chamber Type: Displacement/Rotation
*Boundary
chamber-1.EALL, 1, 1, -1.125
**
** OUTPUT REQUESTS
**
*Restart, write, number interval=1, time marks=NO
**
** FIELD OUTPUT: F-Output-1
**
*Output, field, number interval=1
*Node Output
U,
*Element Output, directions=YES
IVOL, LE, S, SDV
**
** HISTORY OUTPUT: H-Output-1
**
*Output, history, variable=PRESELECT
*End Step
** ----------------------------------------------------------------
**
** STEP: diastole-03
**
*Step, name=diastole-03, nlgeom=YES, inc=10000, unsymm=YES
*Static
0.01, 1., 1e-05, 0.05
**
** BOUNDARY CONDITIONS
**
** Name: chamber Type: Displacement/Rotation
*Boundary
chamber-1.EALL, 1, 1
**
** OUTPUT REQUESTS
**
*Restart, write, number interval=1, time marks=NO
**
** FIELD OUTPUT: F-Output-1
**
*Output, field, number interval=1
*Node Output
U,
*Element Output, directions=YES
IVOL, LE, S, SDV
**
** HISTORY OUTPUT: H-Output-1
**
*Output, history, variable=PRESELECT
*End Step
